# By: Guy Soffer
# Rotation Matrix | Translation Matrix | Ofset Matrix | Test Vector
R := [r_11, r_12, 0; r_21, r_22, 0; 0, 0, 1]  # error: This variable is undefined.
T := [1, 0, t_x; 0, 1, t_y; 0, 0, 1]  # error: This variable is undefined.
T_ofs := [1, 0, -t_x; 0, 1, -t_y; 0, 0, 1]  # error: This variable is undefined.
V := [x; y; 1]  # error: This variable is undefined.
# Rotate a vector 2x2
R*V → [r_11*x + r_12*y; r_21*x + r_22*y; 1]
# Translate a vector 2x2
T*V → [t_x + x; t_y + y; 1]
# Rotate than translate
T*R → [r_11, r_12, t_x; r_21, r_22, t_y; 0, 0, 1]
# Translate than rotate
R*T → [r_11, r_12, r_11*t_x + r_12*t_y; r_21, r_22, r_21*t_x + r_22*t_y; 0, 0, 1]
# Translate than rotate than translate (rotate around the origin (t_x, t_y)
T*R*T_ofs → [r_11, r_12, t_x - r_11*t_x - r_12*t_y; r_21, r_22, t_y - r_21*t_x - r_22*t_y; 0, 0, 1]
